// SBML level 3 version 2
// Michaelis-Menten enzyme mechanism E + S <-> C -> E + P with mass-action kinetics.
//      Written for the companion scripts of the tutorial (SBML Level 3 Version 2 core).

model enzyme_kinetics()
  // Michaelis-Menten enzyme mechanism

  // Compartments:
  compartment cell = 1;

  // Species:
  species E in cell = 1;
  species S in cell = 10;
  species C in cell = 0;
  species P in cell = 0;

  // Parameters:
  k1 = 1;
  km1 = 0.5;
  k2 = 0.3;

  // Reactions:
  binding: E + S => C; cell*k1*E*S;
  unbinding: C => E + S; cell*km1*C;
  catalysis: C => E + P; cell*k2*C;
end
